<Lems>

    <!--
    This LEMS file has been generated from:
        PyNN v0.9.2
        libNeuroML v0.2.40
        pyNeuroML v0.3.11
     -->

    <!-- Specify which component to run -->
    <Target component="Sim_Example6_PyNN"/>

    <!-- Include core NeuroML2 ComponentType definitions -->
    <Include file="Cells.xml"/>
    <Include file="Networks.xml"/>
    <Include file="Simulation.xml"/>

    <Include file="PyNN.xml"/>
    <Include file="Example6_PyNN.net.nml"/>

    <Simulation id="Sim_Example6_PyNN" length="100.0ms" step="0.025ms" target="Example6_PyNN" seed="12345">  <!-- Note seed: ensures same random numbers used every run -->

        <Display id="L23_I_v" title="L23_I v" timeScale="1ms" xmin="-10.0" xmax="110.0" ymin="-70" ymax="10">
            <Line id="L23_I v: cell 64" quantity="L23_I/2/IF_curr_exp_L23_I/v" scale="1mV" color="#e8a787" timeScale="1ms"/>
            <Line id="L23_I v: cell 65" quantity="L23_I/3/IF_curr_exp_L23_I/v" scale="1mV" color="#062d08" timeScale="1ms"/>
            <Line id="L23_I v: cell 66" quantity="L23_I/4/IF_curr_exp_L23_I/v" scale="1mV" color="#909a19" timeScale="1ms"/>
            <Line id="L23_I v: cell 67" quantity="L23_I/5/IF_curr_exp_L23_I/v" scale="1mV" color="#cebaa0" timeScale="1ms"/>
            <Line id="L23_I v: cell 68" quantity="L23_I/6/IF_curr_exp_L23_I/v" scale="1mV" color="#94db2e" timeScale="1ms"/>
            <Line id="L23_I v: cell 69" quantity="L23_I/7/IF_curr_exp_L23_I/v" scale="1mV" color="#844008" timeScale="1ms"/>
            <Line id="L23_I v: cell 70" quantity="L23_I/8/IF_curr_exp_L23_I/v" scale="1mV" color="#5734d2" timeScale="1ms"/>
            <Line id="L23_I v: cell 71" quantity="L23_I/9/IF_curr_exp_L23_I/v" scale="1mV" color="#4bbbc2" timeScale="1ms"/>
            <Line id="L23_I v: cell 62" quantity="L23_I/0/IF_curr_exp_L23_I/v" scale="1mV" color="#9efabe" timeScale="1ms"/>
            <Line id="L23_I v: cell 63" quantity="L23_I/1/IF_curr_exp_L23_I/v" scale="1mV" color="#8a0b3a" timeScale="1ms"/>
        </Display>

        <Display id="L23_E_v" title="L23_E v" timeScale="1ms" xmin="-10.0" xmax="110.0" ymin="-70" ymax="10">
            <Line id="L23_E v: cell 42" quantity="L23_E/0/IF_curr_exp_L23_E/v" scale="1mV" color="#43348a" timeScale="1ms"/>
            <Line id="L23_E v: cell 43" quantity="L23_E/1/IF_curr_exp_L23_E/v" scale="1mV" color="#a8996e" timeScale="1ms"/>
            <Line id="L23_E v: cell 44" quantity="L23_E/2/IF_curr_exp_L23_E/v" scale="1mV" color="#b0236f" timeScale="1ms"/>
            <Line id="L23_E v: cell 45" quantity="L23_E/3/IF_curr_exp_L23_E/v" scale="1mV" color="#fc8b85" timeScale="1ms"/>
            <Line id="L23_E v: cell 46" quantity="L23_E/4/IF_curr_exp_L23_E/v" scale="1mV" color="#a0e377" timeScale="1ms"/>
            <Line id="L23_E v: cell 47" quantity="L23_E/5/IF_curr_exp_L23_E/v" scale="1mV" color="#b02f1e" timeScale="1ms"/>
            <Line id="L23_E v: cell 48" quantity="L23_E/6/IF_curr_exp_L23_E/v" scale="1mV" color="#d397ac" timeScale="1ms"/>
            <Line id="L23_E v: cell 49" quantity="L23_E/7/IF_curr_exp_L23_E/v" scale="1mV" color="#2edb88" timeScale="1ms"/>
            <Line id="L23_E v: cell 50" quantity="L23_E/8/IF_curr_exp_L23_E/v" scale="1mV" color="#e554b4" timeScale="1ms"/>
            <Line id="L23_E v: cell 51" quantity="L23_E/9/IF_curr_exp_L23_E/v" scale="1mV" color="#fc3a6f" timeScale="1ms"/>
        </Display>

        <OutputFile id="OF_L23_I_v" fileName="L23_I_v.dat">
            <OutputColumn id="L23_I_2_IF_curr_exp_L23_I_v" quantity="L23_I/2/IF_curr_exp_L23_I/v"/>
            <OutputColumn id="L23_I_3_IF_curr_exp_L23_I_v" quantity="L23_I/3/IF_curr_exp_L23_I/v"/>
            <OutputColumn id="L23_I_4_IF_curr_exp_L23_I_v" quantity="L23_I/4/IF_curr_exp_L23_I/v"/>
            <OutputColumn id="L23_I_5_IF_curr_exp_L23_I_v" quantity="L23_I/5/IF_curr_exp_L23_I/v"/>
            <OutputColumn id="L23_I_6_IF_curr_exp_L23_I_v" quantity="L23_I/6/IF_curr_exp_L23_I/v"/>
            <OutputColumn id="L23_I_7_IF_curr_exp_L23_I_v" quantity="L23_I/7/IF_curr_exp_L23_I/v"/>
            <OutputColumn id="L23_I_8_IF_curr_exp_L23_I_v" quantity="L23_I/8/IF_curr_exp_L23_I/v"/>
            <OutputColumn id="L23_I_9_IF_curr_exp_L23_I_v" quantity="L23_I/9/IF_curr_exp_L23_I/v"/>
            <OutputColumn id="L23_I_0_IF_curr_exp_L23_I_v" quantity="L23_I/0/IF_curr_exp_L23_I/v"/>
            <OutputColumn id="L23_I_1_IF_curr_exp_L23_I_v" quantity="L23_I/1/IF_curr_exp_L23_I/v"/>
        </OutputFile>

        <OutputFile id="OF_L23_E_v" fileName="L23_E_v.dat">
            <OutputColumn id="L23_E_0_IF_curr_exp_L23_E_v" quantity="L23_E/0/IF_curr_exp_L23_E/v"/>
            <OutputColumn id="L23_E_1_IF_curr_exp_L23_E_v" quantity="L23_E/1/IF_curr_exp_L23_E/v"/>
            <OutputColumn id="L23_E_2_IF_curr_exp_L23_E_v" quantity="L23_E/2/IF_curr_exp_L23_E/v"/>
            <OutputColumn id="L23_E_3_IF_curr_exp_L23_E_v" quantity="L23_E/3/IF_curr_exp_L23_E/v"/>
            <OutputColumn id="L23_E_4_IF_curr_exp_L23_E_v" quantity="L23_E/4/IF_curr_exp_L23_E/v"/>
            <OutputColumn id="L23_E_5_IF_curr_exp_L23_E_v" quantity="L23_E/5/IF_curr_exp_L23_E/v"/>
            <OutputColumn id="L23_E_6_IF_curr_exp_L23_E_v" quantity="L23_E/6/IF_curr_exp_L23_E/v"/>
            <OutputColumn id="L23_E_7_IF_curr_exp_L23_E_v" quantity="L23_E/7/IF_curr_exp_L23_E/v"/>
            <OutputColumn id="L23_E_8_IF_curr_exp_L23_E_v" quantity="L23_E/8/IF_curr_exp_L23_E/v"/>
            <OutputColumn id="L23_E_9_IF_curr_exp_L23_E_v" quantity="L23_E/9/IF_curr_exp_L23_E/v"/>
        </OutputFile>

    </Simulation>

</Lems>
